// SBML level 3 version 2

model Babaev2024___CYP2C9_variants()
  // initial_model
  // model units - time: h, extent: pmol

  // Compartments:
  compartment default = 1 dimensionless; default is "Babaev2024 - CYP2C9 variants";
  compartment central_compartment = 1 dimensionless;
  compartment intestine = 1 dimensionless;
  compartment peripherial_compartment = 1 dimensionless;
  compartment stomach = 1 dimensionless;

  // Species:
  species E3174_out in default = 0;  // substance in pmol
  species E3174_cc in central_compartment = 0;  // substance in pmol
  species losartan_cc in central_compartment = 0;  // substance in pmol
  species losartan_int in intestine = 0;  // substance in pmol
  species losartan_out in default = 0;  // substance in pmol
  species losartan_pc in peripherial_compartment = 0;  // substance in pmol
  species losartan_stm in stomach = oral_dose/(1000 mg_per_g*461.01 g_per_mole)*1e12 pmol_per_mol;  // substance in pmol

  // Parameters:
  // nmol*h/L
  AUC_E3174 = 0 nmol_h_per_L;
  // nmol*h/L
  AUC_Losartan = 0 nmol_h_per_L;
  // dimensionless
  AUC_ratio has dimensionless;
  // L/h
  CL_m = 16.45676 L_per_h;
  // L/h
  CL_p = 30.40196 L_per_h;
  // pmol/ml or nmol/L
  C_m has nmol_per_L;
  // pmol/ml or nmol/L
  C_p has nmol_per_L;
  // L/h
  Q = 217.1036 L_per_h;
  // h
  T = 0.8192144 h;
  // L
  Vm = 57.59837 litre;
  // L
  Vp_1 = 56.17541 litre;
  // L
  Vp_2 = 135.6355 litre;
  // 1/h
  a = 6.645292 per_h;
  // h
  b = 3.95 h;
  // 1/h
  k_12 has per_h;
  // 1/h
  k_21 has per_h;
  // 1/h
  k_a = 5.127392 per_h;
  // 1/h
  k_elm has per_h;
  // 1/h
  k_elp has per_h;
  // 1/h
  k_m = 1.056306 per_h;
  // mg
  oral_dose = 50 mg;
  // dimensionless
  start_CYP2C9 = 0 dimensionless;

  // Assignment rules:
  C_p := losartan_cc/(Vp_1*1000 ml_per_L);
  C_m := E3174_cc/(Vm*1000 ml_per_L);
  AUC_ratio := piecewise(0, C_m == 0, AUC_Losartan/AUC_E3174);
  k_12 := Q/Vp_1;
  k_21 := Q/Vp_2;
  k_elp := CL_p/Vp_1;
  k_elm := CL_m/Vm;

  // Rate rules:
  AUC_Losartan' = C_p;
  AUC_E3174' = C_m;

  // Reactions:
  Reaction_1: losartan_stm => losartan_int; max(0 per_h, a*sin(2*pi/b*time))*losartan_stm; Reaction_1 is "stomach/losartan_stm -> intestine/losartan_int";
  Reaction_2: losartan_int => losartan_cc; k_a*losartan_int; Reaction_2 is "intestine/losartan_int -> central_compartment/losartan_cc";
  Reaction_3: losartan_cc => losartan_out; k_elp*losartan_cc; Reaction_3 is "central_compartment/losartan_cc -> losartan_out";
  Reaction_5: losartan_cc => losartan_pc; k_12*losartan_cc; Reaction_5 is "central_compartment/losartan_cc -> peripherial_compartment/losartan_pc";
  Reaction_6: losartan_pc => losartan_cc; k_21*losartan_pc; Reaction_6 is "peripherial_compartment/losartan_pc -> central_compartment/losartan_cc";
  Reaction_7: E3174_cc => E3174_out; k_elm*E3174_cc; Reaction_7 is "central_compartment/E3174_cc -> E3174_out";
  Reaction_4: losartan_cc => E3174_cc; k_m*losartan_cc*start_CYP2C9; Reaction_4 is "central_compartment/losartan_cc -> central_compartment/E3174_cc";

  // Events:
  CYP2C9_delay: at (time > T), t0=false: start_CYP2C9 = 1; CYP2C9_delay is "losartan metabolism delay";

  // Unit definitions:
  unit pmol_per_mol = 1e-12 mole / mole;
  unit h = 3600 second;
  unit nmol_h_per_L = 1e-9 mole * 3600 second / litre;
  unit nmol_per_L = 1e-9 mole / litre;
  unit pmol = 1e-12 mole;
  unit g_per_mole = 1e-3 kilogram / mole;
  unit mg_per_g = 1e-6 kilogram / (1e-3 kilogram);
  unit mg = 1e-6 kilogram;
  unit L_per_h = litre / (3600 second);
  unit ml_per_L = 1e-3 litre / litre;
  unit per_h = 1 / (3600 second);
end
